# TIP4P/2005 water model

echo            both
units           real # m=g/mol, d=Ang, t=fs, E=Kcal/mol, T=K, P=atm, Dynamic viscoty=Poise, charge=e (negative=-)
                #

atom_style      full
bond_style      harmonic
angle_style     harmonic
boundary	p p f


pair_style    lj/cut/coul/long 8 8
read_data       data_eq_10ns.lmp                                                        #

pair_coeff      1   1   	0.0000   0.0000    	# No LJ between H-H
pair_coeff      2   2   	0.1553   3.1660 	# LJ epsilon and LJ sigma betweenO-O
pair_coeff      1   2   	0.0000   0.0000  	# No LJ between H-O

pair_modify     shift yes	# determines whether a Lennard-Jones potential is shiftedat its cutoff to 0.0

group		Oxigen type 2
group		Hydrogen type 1
group   	spce type 1:2

kspace_style  pppm 1e-4
kspace_modify	slab 3.0
fix fRattleSPCE spce shake 0.0001 10 0 b 1 a 1
#minimize 1.0e-4 1.0e-6 10 100
reset_timestep 0


#thermo          200000 #output thermodynamics every N timesteps
thermo          10
thermo_style    custom pxx pyy #Set the style and content for printing thermodynamic data to the screen and log file.
#---------------------------------------------Forces
variable        eps equal 0.3
variable        sig5 equal 2.49895

variable        s6 equal -7.7663
variable        d6 equal 15.76631
#variable        s6 equal -5.000
#variable        d6 equal 18.0

variable        forcez6 atom "12*v_eps*((3/(z+v_s6))*(v_sig5/(z+v_s6))^9-(1/(z+v_s6))*(v_sig5/(z+v_s6))^3-(3/(z-v_d6))*(v_sig5/(z-v_d6))^9+(1/(z-v_d6))*(v_sig5/(z-v_d6))^3)"
variable        potenergy6 atom "4*v_eps*((v_sig5/(z+v_s6))^9-(v_sig5/(z+v_s6))^3-(v_sig5/(z-v_d6))^9+(v_sig5/(z-v_d6))^3)"


#---------------------------------------------Equilibration And Thermalization
variable        T equal 300


#minimize 1.0e-4 1.0e-6 10 100

timestep        1
#velocity 	all create ${T} 12345
fix             6 spce nvt temp $T  $T 1000


fix		5 all momentum 2000 linear 1 1 0 # Total momentum=0

#thermo          100000 #output thermodynamics every N timesteps
thermo		10000
thermo_style    custom step time cpu etotal ke pe ebond eangle evdwl ecoul elong press vol density #Set the style and content for printing thermodynamic data to the screen and log file.
set		group all image 0 0 0

fix             21 Oxigen addforce 0.0 0.0 v_forcez6 #energy v_potenergy6

run		10000

dump            3 spce custom 50000 H2O_prod_100ns.lmp element x y z q
dump_modify     3 element H O
dump_modify     3 sort id
run             100000000
undump          3
write_data      data_prod_100ns.lmp
